#verbose no

units		si
atom_style	granular
atom_modify	map array


communicate	single vel yes

boundary	f f f
newton		off

processors * * 1
region		box block 0. 1. 0. 1. 0. 2. units box
create_box	1 box

variable	skin equal 0.01
neighbor	${skin} bin
neigh_modify	delay 0 binsize 0.01 one 1000

fix grav all gravity 0.981 vector 0 0 -1


fix 		m1 all property/global youngsModulus peratomtype 1e8
fix 		m2 all property/global poissonsRatio peratomtype 0.4
fix 		m3 all property/global coefficientRestitution peratomtypepair 1 0.95
fix 		m4 all property/global coefficientFriction peratomtypepair 1 0.45
fix 		m5 all property/global coefficientRollingFriction peratomtypepair 1 0.020

# lb coupling fix
fix lbcoupling all couple/lb/onetoone


pair_style	gran model hertz tangential history rolling_friction cdt
pair_coeff	* *

fix		1 all nve/sphere

fix xwalls1 all wall/gran model hertz tangential history primitive type 1 xplane 0.
fix xwalls2 all wall/gran model hertz tangential history primitive type 1 xplane 1.
fix ywalls1 all wall/gran model hertz tangential history primitive type 1 yplane 0.
fix ywalls2 all wall/gran model hertz tangential history primitive type 1 yplane 1.
fix zwalls1 all wall/gran model hertz tangential history primitive type 1 zplane 0.
fix zwalls2 all wall/gran model hertz tangential history primitive type 1 zplane 2.

#create_atoms 1 single 0.5 0.5 9.75
#create_atoms 1 single 0.38 0.05 0.05

#set group all diameter 0.25 density 2400

#atom_modify sort 0 0.0

#fix pts1 all particletemplate/sphere 1 atom_type 1 density constant 1000 radius constant 0.015
#fix pts2 all particletemplate/sphere 1 atom_type 1 density constant 1000 radius constant 0.01
#fix pts1 all particletemplate/sphere 1 atom_type 1 density constant 1100 radius constant ${r_part}
fix  pts1 all particletemplate/sphere 15485863 atom_type 1 density constant 2500 radius constant 0.01

fix pdd1 all particledistribution/discrete 32452843  1 pts1 1.0
#fix pdd2 all particledistribution/discrete 6778  2 pts2 0.2 pts3 0.8

region  insreg block 0.1 0.9 0.1 0.9 1.3 1.9 units box


#fix ins all insert/pack seed 1001 distributiontemplate pdd1 insert_every once &
#                         overlapcheck yes particles_in_region 350 region insreg ntry_mc 10000
#fix ins all insert/pack seed 1001 distributiontemplate pdd1 insert_every once &
#                        overlapcheck yes volumefraction_region ${v_frac} region insreg ntry_mc 10000
fix ins all insert/pack seed 32452867 distributiontemplate pdd1 insert_every once &
                        overlapcheck yes volumefraction_region 0.1 region insreg ntry_mc 1001
#fix ins all insert/pack seed 1001 distributiontemplate pdd1 insert_every once &
#                        overlapcheck yes particles_in_region 1 region insreg ntry_mc 10000

echo none

run 1
